# 1) Signal Impulsionnel
A1 := 2
T1 := 1
α := T1/10  # Rapport cyclique
m1(t) := A1*Φ(t) - A1*Φ(t - α)
E1(t) := sum(m1(t - i*T1), i = 0 .. 10)
t1 := 0, T1/100 .. 5*T1
# [plot: m1(t1), E1(t1) vs t1]
# 2) Signal en dent de scie
A2 := 2
T2 := 1
m2(t2) := A2/T2*t2*Φ(t2) - A2/T2*t2*Φ(t2 - T2)
E2(t) := sum(m2(t - i*T2), i = 0 .. 10)
t2 := 0, T2/100 .. 5*T2
# [plot: m2(t2), E2(t2) vs t2]
# 3) Signal rond ?
A3 := 2
T3 := π
m3(t3) := A3*sin(t3)*Φ(t3) - A3*sin(t3)*Φ(t3 - π)
t3 := 0, T3/100 .. 5*T3
E3(t3) := sum(m3(t3 - i*T3), i = 0 .. 10)
# [plot: m3(t3), E3(t3) vs t3]
