# Hypothèses :
K := -1
F0 := 2*10^3
ζ := sqrt(2)/2
# Fonction de transfert :
ω0 := 2*π*F0
τ := 1/ω0
T0 := 1/F0
H(s) := K*2*ζ*τ*s/(1 + 2*ζ*τ*s + τ^2*s^2)
Q := 1/(2*ζ)
BW := F0/Q
FC1 := F0*(-1/(2*Q) + sqrt(1 + 1/(4*Q^2)))
Gmax := 20*log(|K|)
FC2 := F0*(1/(2*Q) + sqrt(1 + 1/(4*Q^2)))
# 1) Analyse Harmonique
# Réponse en fréquence dans le plan de BODE :
# - Diagrammes asymptotiques
# Gain ->
AsG(F) := if(F < F0, 20*log(|K*2*ζ|) + 20*log(|F/F0|), 20*log(|K*2*ζ|) - 20*log(|F/F0|))
# Phase ->
Asφ(F) := if(F < F0, -arg(K) + π/2, arg(K) - π/2)
# - Diagrammes réels
# a ne plus changer (tj le meme)
G(F) := 20*log(|H(1i*2*π*F)|)
φ(F) := arg(H(1i*2*π*F))
# -Graphes
# Commentaire de synthaxe : F:= Fmin,Fmin+Pas..Fmax
i := 1 .. 265
F[i] := 10^(2 + i/100)
# [plot: AsG(F[i]), G(F[i]) vs F[i]]
FC1 = 1035.28
# Frequence de coupure numero 1
20*log(|K|) - 3 = -3
FC2 = 3863.7  # Frequence de coupure numero 2
Gmax = 0
# Gain maximal
BW = 2828.43
# [plot: Asφ(F[i]) (deg), φ(F[i]) (deg) vs F[i]]
φ(F0) = 180 deg
# 2) Analyse Indicielle
# 1) Réponse à un echelon e(t)=A*H(t)
A1 := 1
e(t) := A1*Φ(t)
E(s) := e(t) laplace, t → 1/s
S(s) := H(s)*E(s) parfrac, s, float, 3 → -17771.0/(s^2 + 4000*π*sqrt(2)*s + 16000000*π^2)
s1(t) := S(s) invlaplace, s, float, 3 → 1.0i*e^(-((8886.0 - 8886i)*t)) - 1.0i*e^(-((8886.0 + 8886.0i)*t))
s1(t) := s1(t)*Φ(t)
t1 := -τ, -τ + τ/100 .. 15*τ
s1'(t) := H(s)*E(s) invlaplace, s, float, 3 → -2.0*e^(-8885.0*t)*sin(8885.0*t)
s1'(t) := s1'(t)*Φ(t)
# [plot: e(t1), s1(t1), s1'(t1) vs t1]
# 2) Reponse à une rampe e(t)=A*t*H(t)
A2 := 1
e2(t) := A2*t*Φ(t)
E2(s) := e2(t) laplace, t → 1/s^2
S2(s) := H(s)*E2(s) parfrac, s, float, 3 → (8000*π + sqrt(2)*s)/(16000000*π*(s^2/4000 + π*sqrt(2)*s + 4000*π^2)) - sqrt(2)/(4000*π*s)
s2(t) := S2(s) invlaplace, s, float, 3 → 0.000113*e^(-8885.0*t)*cos(8885.0*t) + 0.000113*e^(-8885.0*t)*sin(8885.0*t) - 0.000113
s2(t) := s2(t)*Φ(t)
t2 := -τ, -τ + τ/100 .. 15*τ
# [plot: e2(t2), s2(t2) vs t2]
# 3) Reponse à une entrée sinnusoïdale e(t)=A*sin(ω0t)*H(t)
A3 := 1
e3(t) := A3*sin(ω0*t)*Φ(t)
E3(s) := e3(t) laplace, t → 4000*π/(s^2 + 16000000*π^2)
S3(s) := H(s)*E3(s) parfrac, s, float, 3 → 4000*π/(s^2 + 4000*π*sqrt(2)*s + 16000000*π^2) - 64000000000*π/(16000000*s^2 + 256000000000000*π^2)
s3(t) := S3(s) invlaplace, s, float, 3 → -1.0*sin(12566.0*t) + 1.41*e^(-8885.0*t)*sin(8885.0*t)
s3(t) := s3(t)*Φ(t)
T0 := 1/F0
t3 := 0, 0 + T0/100 .. 5*T0
# [plot: e3(t3), s3(t3) vs t3]
# 4) Réponse à un signal rectangulaire
A4 := 1
F := F0
T := 1/F
e4(t) := A4*sum((-1)^i*Φ(t - i*T/2), i = 0 .. 10)
s4(t) := A4*sum((-1)^i*s1(t - i*T/2), i = 0 .. 10)
t := 0, T/100 .. 5*T
# [plot: e4(t), s4(t) vs t]
# 5) Réponse à un signal triangulaire
A5 := 1
F := F0
T := 1/F
e5(t) := 2*A5/T*(t*Φ(t) + 2*sum((-1)^i*(t - i*T/2)*Φ(t - i*T/2), i = 1 .. 100))
s5(t) := 2*A5/T*(s2(t) + 2*sum((-1)^i*s2(t - i*T/2), i = 1 .. 100))
t := 0, T/100 .. 5*T
# [plot: e5(t), s5(t) vs t]
