# Hypothèse :
K := 1
F0 := 2*10^3
R := 10^4
ζ := 0.707
# Fonction de transfert :
ω0 := 2*π*F0
τ := 1/ω0
H(s) := K/(1 + 2*ζ*τ*s + τ^2*s^2)
Fr := F0*sqrt(1 - 2*ζ^2)
Gmax := 20*log(|K|/(2*ζ*sqrt(1 - ζ^2)))
Fc := F0*sqrt((1 - 2*ζ^2) + sqrt(1 + (1 - 2*ζ^2)^2))
# 1) Analyse Harmonique
# Réponse en fréquence dans le plan de BODE :
# - Diagrammes asymptotiques
# Gain ->
AsG(F) := if(F < F0, 20*log(|K|), 20*log(|K|) - 40*log(|F/F0|))
# Phase ->
Asφ(F) := if(F < F0, arg(K), arg(K) - π)
# - Diagrammes réels
G(F) := 20*log(|H(1i*2*π*F)|)
φ(F) := arg(H(1i*2*π*F))
# -Graphes
# Commentaire de synthaxe : F:= Fmin,Fmin+Pas..Fmax
i := 1 .. 400
F[i] := 10^(2 + i/100)
# [plot: AsG(F[i]), G(F[i]) vs F[i]]
Fr = 34.7563
# Frequence de resonance
20*log(|K|) - 3 = -3
Gmax = 3.96094e-7  # Gain maximal
Fc = 2000.3  # Frequence de coupure
# [plot: Asφ(F[i]) (deg), φ(F[i]) (deg) vs F[i]]
φ(F0) = -90 deg
# 2) Analyse Indicielle
# 1) Réponse à un echelon e(t)=A*H(t)
A1 := 1
e(t) := A1*Φ(t)
E(s) := e(t) laplace, t → 1/s
S(s) := H(s)*E(s) parfrac, s, float, 3 → 1.0/s - (1.0*s + 17770.0)/(17770.0*s + s^2 + 1.58*10^8)
s1(t) := S(s) invlaplace, s, float, 3 → -1.0*e^(-8885.0*t)*cos(8891.0*t) + (-0.999*e^(-8885.0*t)*sin(8891.0*t)) + 1.0
s1(t) := s1(t)*Φ(t)
t1 := -τ, -τ + τ/100 .. 15*τ
s1'(t) := H(s)*E(s) invlaplace, s, float, 3 → 1.0 - (0.5 - 0.5i)*e^(-((8888.0 - 8884i)*t)) - (0.5 + 0.5i)*e^(-((8888.0 + 8884.0i)*t))
s1'(t) := s1'(t)*Φ(t)
# [plot: e(t1), s1(t1), s1'(t1) vs t1]
# 2) Reponse à une rampe e(t)=A*t*H(t)
A2 := 1
e2(t) := A2*t*Φ(t)
E2(s) := e2(t) laplace, t → 1/s^2
S2(s) := H(s)*E2(s) parfrac, s, float, 3 → 1.0/s^2 - 0.000113/s + (9.0*s + 79952.0)/(1.42*10^9*s + 80000*s^2 + 1.26*10^13)
s2(t) := S2(s) invlaplace, s, float, 3 → t + 0.000112*e^(-8875.0*t)*cos(8873.0*t) + 1.11*10^-7*e^(-8875.0*t)*sin(8873.0*t) - 0.000113
s2(t) := s2(t)*Φ(t)
t2 := -τ, -τ + τ/100 .. 15*τ
# [plot: e2(t2), s2(t2) vs t2]
# 3) Reponse à une entrée sinnusoïdale e(t)=A*sin(ω0t)*H(t)
A3 := 1
e3(t) := A3*sin(ω0*t)*Φ(t)
E3(s) := e3(t) laplace, t → 4000*π/(s^2 + 16000000*π^2)
S3(s) := H(s)*E3(s) parfrac, s, float, 3 → (1767.0*s + 3.14*10^7)/(4.44*10^7*s + 2500*s^2 + 3.95*10^11) - (3534.0*s + 20025.0)/(5000*s^2 + 7.9*10^11)
s3(t) := S3(s) invlaplace, s, float, 3 → -0.707*cos(12569.0*t) + (-0.000319*sin(12569.0*t)) + 0.707*e^(-8880.0*t)*cos(8896.0*t) + 0.706*e^(-8880.0*t)*sin(8896.0*t)
s3(t) := s3(t)*Φ(t)
T0 := 1/F0
t3 := 0, 0 + T0/100 .. 5*T0
# [plot: e3(t3), s3(t3) vs t3]
# 4) Réponse à un signal rectangulaire
A4 := 1
F := F0
T := 1/F
e4(t) := A4*sum((-1)^i*Φ(t - i*T/2), i = 0 .. 10)
s4(t) := A4*sum((-1)^i*s1(t - i*T/2), i = 0 .. 10)
t := 0, T/100 .. 5*T
# [plot: e4(t), s4(t) vs t]
# 5) Réponse à un signal triangulaire
A5 := 1
F := F0
T := 1/F
e5(t) := 2*A5/T*(t*Φ(t) + 2*sum((-1)^i*(t - i*T/2)*Φ(t - i*T/2), i = 1 .. 100))
s5(t) := 2*A5/T*(s2(t) + 2*sum((-1)^i*s2(t - i*T/2), i = 1 .. 100))
t := 0, T/100 .. 5*T
# [plot: e5(t), s5(t) vs t]
