# Ex 1)
y(n) := (4*z - 3*z^2)/(3*(z - 1)^2) invztrans → n/3 - 1
y(1) = -0.666667
y(2) = -0.333333
y(5) = 0.666667
limit(y(n), n → ∞) → ∞
# Ex 2)
t(n) := z/(z^2 - z - 1) invztrans → sqrt(5)*(sqrt(5)/2 + 1/2)^n/5 - sqrt(5)*(1/2 - sqrt(5)/2)^n/5
t(1) = 1
t(2) = 1
t(3) = 2
t(12) = 144
limit(t(n + 1)/t(n), n → ∞) → limit(sqrt(5)*((1/2 - sqrt(5)/2)^(n + 1)/5 - (sqrt(5)/2 + 1/2)^(n + 1)/5)/(sqrt(5)*(1/2 - sqrt(5)/2)^n/5 - sqrt(5)*(sqrt(5)/2 + 1/2)^n/5), n → ∞)
# Ex 3)
a(n) := -2*z/(z^2 - 7/4*z + 3/4) invztrans → 8*(3/4)^n - 8
