a := 1/2
H(z) := (a*z - 1)/(z - a)
F(ν) := |H(e^(2i*π*ν))|
# [plot: F(ν) vs ν]
H(z) := z/(z - 1)
F(ν) := |H(e^(2i*π*ν))|
limit(F(ν), ν → 0) → ∞
H(z) invztrans → 1
# [plot: F(ν) vs ν]
a := 1/20
H(z) := (1 - a)*(z - 1)/(z - a)
F(ν) := |H(e^(2i*π*ν))|
# [plot: F(ν) vs ν]
