# Exercice 1 – Filtre I
# 1. Il s'agit d'un FIR car h arrive à 0
# 2. Il n'y a pas de réjection avant 0 (h(-1)=..) donc causal.
# 3. Il est asymptotiquement stable car sa sortie tend vers 0 quand son entrée tend vers l'infini. (tout FIR est asymptotiquement stable)
# 4.
h(z) := 2*(z^3 - 1 - z + z^2)/z^3
# ex avec Fe=1khz :
# [plot: |h(e^(2i*π*v))| vs v]
# 6.15/sqrt(2)
# kc | ki
# Exercice 2 -Filtre II
# 1/ Il s'agit d'un FIR car on ne réinjecte pas les sorties dans les entrées.
# 2/ Il est causal car il n'y a que des retards (n-1) (n-2) pas de +1.
# 3/ Il est asymptotiquement stable car c'est un FIR
# 4/
H(z) := (1 + z + z^2)/(3*z^2)
# [plot: |H(e^(2i*π*v))| vs v]
# Exercice 3 :
# 1/ FIR car seuls poles sont 0.
# 2/ pas causal, donc on multiplie par
# 3/
H(z) := 1/π*(6 - 10*z^2 + 30*z^4 + 15*π*z^5 + 30*z^6 - 10*z^8 + 6*z^10)/(30*z^5)
# [plot: |H(e^(2i*π*v))| vs v]
# exercice 4 :
# 1/ IIR car les sorties sont réinjectées.
# 2/ causal car que retard pas n+1, il dépend du passé
# 3/
H(z) := z^2/(z^2 - 3/2*z + 15/16)
# [plot: |H(e^(2i*π*v))| vs v]
# 5/ C'est un filtre passe bande
z^2 - 3/2*z + 15/16 solve → [3/4 + sqrt(6)*1i/4; 3/4 - sqrt(6)*1i/4]
3/4 + sqrt(6)*1i/4 = 0.75 + 0.612372i
z^2 - 3/2*z + 16/15 solve → [3/4 + 11i*sqrt(15)/60; 3/4 - 11i*sqrt(15)/60]
3/4 + 11i*sqrt(15)/60 = 0.75 + 0.710047i
