# 1.3 Etude pratique
# Analyse frequentielle du filtre
# 1)
Fc := 300
Fe := 10000
τ := 1/(2*π*Fc) = 0.000530516
Te := 1/Fe = 0.0001
a1 := -τ/(τ + Te) = -0.8414
b0 := Te/(τ + Te) = 0.1586
# On retrouve les mêmes coefficients que dans la préparation.
# 2)
# Fonction analogique :
Han1(f) := 1/(1 + 1i*2*π*τ*f)
# Fonction numérique :
Hn1(f) := b0/(1 + a1*exp(-1i*2*π*f*Te))
# 3)
Gan1dB(f) := 20*log(|Han1(f)|)
Gn1dB(f) := 20*log(|Hn1(f)|)
Φan1(f) := arg(Han1(f))
Φn1(f) := arg(Hn1(f))
f := 10 .. 10000
# [plot: Gan1dB(f), Gn1dB(f) vs f]
# On peut voir le repliment du filtre numérique qui se trouve à Fe/2=5000 Hz. On va maintenant comparer leur gain à la fréquence de coupure.
# [plot: Gan1dB(f), Gn1dB(f) vs f]
# On trouve le gain du filtre analogique equivalent a -2.994 dB, et le gain du filtre numerique a -3.399 dB. On peut d'ailleur le calculer directement avec :
Gan1dB(Fc) = -3.0103
Gn1dB(Fc) = -3.39448
# Traitement des données
# 1)
N := 512
k := 0 .. N - 1
x[k] := 0
y[k] := 0
# 2)
x := READPRN("E:\TNS 3\Fichier_Données_Filtre_PB2.prn")
# [plot: x[k] vs k]
# 3)
# Nombre de ligne :
length(x) = 512
# Nombre de colonne :
cols(x) = 1
# Valeur maximum :
max(x) = 4.247
# Valeur minimum :
min(x) = -4.628
# 4)
spectrex := fft(x)
fn := Fe/N
k := 0 .. N - 1
# [plot: 2*|spectrex[k]| vs k*fn]
# On voit la fondamentale, qui se trouve a 100Hz, et les 2 harmoniques qui se trouve au environ des 1000Hz.
y[k] :=
    if k ≤ 0
        b0*x[k]
    else if k > 0
        b0*x[k] - a1*y[k - 1]
# [plot: y[k] vs k]
# 1.3.2 Filtre numérique LP du 2eme ordre
F0 := 300
Fe := 10000
Q := 1
ζ := 1/(2*Q) = 0.5
Han2(s) := 1/(1 + 2*ζ*τ*s + τ^2*s^2)
Hn2(f) := Te^2/(Te^2 + 2*ζ*Te*τ - 2*ζ*Te*τ*exp(-1i*2*π*f*Te)^-1 + τ^2 - τ^2*exp(-1i*2*π*f*Te)^-2)
toto := Te^2 + 2*ζ*Te*τ + τ^2
Hn2(f) := Te^2/toto/(1 - 2*ζ*Te*τ/toto*exp(-1i*2*π*f*Te)^-1 - τ^2/toto*exp(-1i*2*π*f*Te)^-2)
# On peut donc maintenant recuperer a1, a2 et b0, en n'oubliant pas de remplacer 'toto'.
a1 := -2*ζ*Te*τ/(Te^2 + 2*ζ*Te*τ + τ^2) = -0.153996
a2 := -τ^2/(Te^2 + 2*ζ*Te*τ + τ^2) = -0.816976
b0 := Te^2/(Te^2 + 2*ζ*Te*τ + τ^2) = 0.0290276
# 2)
# Afin que mathcad arrive a calculer la fonction et donc arrive a afficher la fonction, on integre a1, a2 et b0 a la fonction
Hn2(f) := b0/(1 + a1*exp(-1i*2*π*f*Te)^-1 + a2*exp(-1i*2*π*f*Te)^-2)
Gan2dB(f) := 20*log(|Han2(f)|)
Gn2dB(f) := 20*log(|Hn2(f)|)
Φan2(f) := arg(Han2(f))
Φn2(f) := arg(Hn2(f))
f := 10 .. 10000
# [plot: Gan2dB(f), Gn2dB(f) vs f]
# 3)
# On retrouve la même réponse de repliment sur la courbe du filtre numerique mais avec une reponse plus violente et avec une oscillation.
# Traitement de données
y[k] :=
    if k ≤ 0
        b0*x[k]
    else if 0 < k ≤ 1
        b0*x[k] - a1*y[k - 1]
    else if 2 ≤ k
        b0*x[k] - a1*y[k - 1] - a2*y[k - 2]
# [plot: x[k], y[k] vs k]
# y[k] ressemble au signal x[k], mais avec moins d'amplitude, surtout pour les pics de variation, qui on été lissé avec la courbe moyenne, et on remarque aussi le retard, mais qui est previsible vu que le traitement numerique est réalisé en temps différé, il suffit d'utiliser un DSP pour filtrer en temps réel.
# 3)
N := 512
k := 0 .. N - 1
fn := Fe/N
spectrex := fft(x)
spectrey := fft(y)
# [plot: 2*|spectrex[k]|, 2*|spectrey[k]| vs k*fn]
# On retrouve la frequence de la fondamentale a 98 Hz, de la premiere harmonique a 600Hz, et de la deuxieme a 1400Hz.
# 4)
# On se rend compte que le spectre du filtre numerique (ici en bleu) est certe bien plus faible, environ 25% de la valeur total de la fondamentale de base, pour la fondamentale du numérique, et moins de 5% de la valeur total des harmoniques de bases, pour les harmoniques du spectre. On perd donc beaucoup en puissance, mais on grace a ceci, on perd pratiquement tous le bruit qui se trouvait avec les harmoniques.
# Donc on voit bien qu'un filtre numérique est bien plus precis et presque sans aucun bruit que un filtre analogique, mais il sera beaucoup moins puissant.
