# TP n°1 : Traitement numerique de données
# Emeric David
# Luc Rastello
τ := 5.3*10^-4
fe := 10000
# 1.1) Objectif
# L'objectif de ce TP, va etre de créer un filtre numerique défini sur un signal echantilloné, dans le but de comparer ces derniers, pour voir leurs avantages et inconveniants.
# 1.2) Etude théorique
# 1.2.1) Filtre numérique LP du 1er ordre
# 1) La fonction de transfert d'un filtre analogique LP de 1er ordre est :
Han1(s) := K/(1 + τ*s)
# Avec,
fc := 1/(2*π*τ)
# 2) Avec l'aide de la methode d'Euler, on pose s := fe(1 - z^-1), ce qui nous donne :
Hn1(z) := K/(1 + τ*fe(1 - z^-1))
Hn1(z) := 1/(1 + τ*fe)*K/(1 - τ*fe/(1 + τ*fe)*z^-1)
# Rappel :
b0/(1 + a1*z^-1)
b0 := 1/(1 + τ*fe)
a1 := -τ*fe/(1 + τ*fe)
# On a fe := 10000Hz et fc := 300Hz, donc τ := 5.3*10^-4seconde.
# Donc
b0 := 1/(1 + 5.3*10^-4*10000) = 0.15873
# et
a1 := -5.3*10^-4*10000/(1 + 5.3*10^-4*10000) = -0.84127
# 1.2.2) Filtre numérique LP du 2eme ordre
# 1)
# On nous donne sa frequence propre f0 := 300Hz et le facteur de surtension Q := 1. On peut en deduire que ω0 := 2*π*f0 = 1884.96
Han2(s) := 1/(1 + 1/Q*s/ω0 + (s/ω0)^2)
# 2) Avec l'aide de la méthode d'Euler, on a :
Hn2(z) := 1/(1 + 1/(Q*ω0)*fe(1 - z^-1) + 1/ω0^2*fe(1 - z^-1)^2)
Hn2(z) := 1/(1 + fe/(Q*ω0) + fe/ω0^2)*1/(1 - (fe/(Q*ω0) + 2*fe^2/ω0^2)/(1 + fe/(Q*ω0) + fe/ω0^2)*z^-1 + fe^2/ω0^2/(1 + fe/(Q*ω0) + fe/ω0^2)*z^-2)
# Rappel :
b0/(1 + a1*z^-1 + a2*z^-2)
# On a donc :
b0 := 1/(1 + fe/(Q*ω0) + fe/ω0^2) = 0.158529
a1 := -(fe/(Q*ω0) + 2*fe^2/ω0^2)/(1 + fe/(Q*ω0) + fe/ω0^2) = -9.76457
a2 := fe^2/ω0^2/(1 + fe/(Q*ω0) + fe/ω0^2) = 4.46177
