# I/
# Analyse fréquentielle du filtre
# 1.
Fc := 300
Fe := 10000
τ := 1/(2*π*Fc) = 0.000530516
Te := 1/Fe = 0.0001
a1 := -τ/(τ + Te) = -0.8414
b0 := Te/(τ + Te) = 0.1586
# 2.
Ha1(f) := 1/(1 + 1i*2*π*τ*f)
Hn1(f) := b0/(1 + a1*exp(-1i*2*π*f*Te))
# 3.
Ga1dB(f) := 20*log(|Ha1(f)|)
Gn1dB(f) := 20*log(|Hn1(f)|)
ϕa1(f) := arg(Ha1(f))
ϕn1(f) := arg(Hn1(f))
f := 0, 10 .. 10000
# [plot: Ga1dB(f), Gn1dB(f) vs f]
# Le filtre numérique remonte à Fe/2 ce qui correspond au repliement du filtre.
# [plot: Ga1dB(f), Gn1dB(f) vs f]
# Avec le graphique on trouve -3.015 dB pour l'analogique et -3.419 dB pour le numérique.
# Nous pouvons le calculer directement :
Ga1dB(Fc) = -3.0103
Gn1dB(Fc) = -3.39448
N := 512
k := 0 .. N - 1
x[k] := 0
y[k] := 0
x := READPRN("C:\ETUDIANTS\Donnees_PB1.prn")  # error: Impossible d'ouvrir le fichier de données.
# [plot: x[k] vs k]
# max=4.424  min=-4.368 | 1 colonne car valeurs de x, 512 lignes car échantillons
cols(x) = 1
rows(x) = 512
max(x) = 4.394
min(x) = -4.367
# On zoom
# [plot: x[k] vs k]
spectrex := FFT(x)
fn := Fe/N
k := 0 .. N - 1
# [plot: 2*|spectrex[k]| vs k*fn]
# On voit le fondamental et ses 2 harmoniques
y[k] :=
    if k ≤ 0
        b0*x[k]
    else
        b0*x[k] - a1*y[k - 1]  # error: Cette variable est indéfinie. Vérifiez que le libellé est correctement défini.
# [plot: y[k] vs k]
# [plot: y[k] vs k]
spectrey := FFT(y)
fn := Fe/N
k := 0 .. N - 1
# [plot: 2*|spectrey[k]| vs k*fn]
# On voit le fondamental et ses 2 harmoniques
# II.
f0 := 300
Q := 1
fe := 10000
ζ := 1/(2*Q) = 0.5
Ha2(s) := K/(1 + 2*ζ*τ*s + τ^2*s^2)
Hn2(f) := K*Te^2/(Te^2 + 2*ζ*Te*τ - 2*ζ*Te*τ*exp(-1i*2*π*f*Te)^-1 + τ^2 - τ^2*exp(-1i*2*π*f*Te)^-2)
X := Te^2 + 2*ζ*Te*τ + τ^2
Hn2(f) := K*Te^2/X/(1 - 2*ζ*Te*τ/X*exp(-1i*2*π*f*Te)^-1 - τ^2/X*exp(-1i*2*π*f*Te)^-2)
b0 := K*Te^2/X = 0.0290276 K
a1 := -2*ζ*Te*τ/X = -0.153996
a2 := -τ^2/X = -0.816976
y[k] :=
    if k ≤ 0
        b0*x[k]
    else if k ≤ 1
        b0*x[k] - a1*y[k] - 1
    else if 2 ≤ k
        b0*x[k] - a1*y[k - 1] - a2*y[k - 2]  # error: Cette variable est indéfinie. Vérifiez que le libellé est correctement défini.
